@Author Thomas Helfer;
@Date   09/08/2022;
@Model 'src/libModel.so' 'ChemicalReaction1';

@Real 'B0' 0.1;
@StateVariable 'MolarConcentrationOfSpeciesA' '0';
@StateVariable 'MolarConcentrationOfSpeciesB' 'B0';

@Parameter 'ReactionRateCoefficientAB' @k1@;

@Times{0, 360 in 100};
